# Тема 2. Спектральный анализ периодических сигналов.
# Сигнал представляет собой периодическую последовательность импульсов длительностью и и периодом T. Произвести спектральный анализ периодической последовательности импульсов. Получить аналитические выражения для коэффициентов разложения. Найти амплитуду и фазу гармоник и построить амплитудные и фазовые спектральные диаграммы.  Определить количество гармоник, в которых содержится не менее 95 % мощности заданного сигнала.
# Длительность импульса:
ti := 96*10^-6
# Период:
T := 384*10^-6
# Амплитуда
A0 := 30
# Исходный сигнал
S(t) :=
    A0 if 0 ≤ mod(ti/2 + |t|, T) ≤ ti
    0 otherwise
ω := 2*π/T
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a0 := 2*A0*ti/T
a(n) := 4*A0/(n*ω*T)*sin(n*ω*ti/2)
A(n) := |a(n)|
k := 1 .. 30
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ϕ(n) :=
    0 if a(n) ≥ 0
    π otherwise
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S(t) := a0/2 + sum(A(n)*cos(n*ω*t - ϕ(n)), n = 1 .. 20)
Pc := 1/T*A0^2*ti
Pk := (a0/2)^2 + 1/2*sum(A(n)^2, n = 1 .. 20)
Pk/Pc = 0.979777
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n := 1 .. 20
Φ[n] := ϕ(n)
A[n] := a(n)
a0 = 15
A = [0; 13.5047; 9.5493; 4.50158; 0; -2.70095; -3.1831; -1.92925; 0; 1.50053; 1.90986; 1.2277; 0; -1.03883; -1.36419; -0.900316; 0; 0.794397; 1.06103; 0.710776; 0]
Φ = [0; 0; 0; 0; 0; 3.14159; 3.14159; 3.14159; 3.14159; 0; 0; 0; 0; 3.14159; 3.14159; 3.14159; 3.14159; 0; 0; 0; 0]
