# Тема 3. Спектральный анализ непериодических сигналов.
# Задан одиночный импульс амплитудой Emax и длительностью tи. Определить спектральную плотность импульса. Построить амплитудный и фазовый спектр заданного импульса. Определить практическую ширину спектра, в котором содержится не менее 95 % энергии одиночного импульса.
# Длительность импульса:
ti := 96*10^-6
# Амплитуда импульса:
A0 := 30
# Решение:
# Исходный сигнал:
S(t) :=
    A0 if 0 ≤ ti/2 + |t| ≤ ti
    0 otherwise
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s(ω) := integral(A0*e^(-1i*ω*t), t = -ti/2 .. ti/2)
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s(ω) → 60*sin(3*ω/62500)/ω
φ(ω) := atan(Im(s(ω))/Re(s(ω)))
φ(ω) :=
    0 if Re(s(ω)) ≥ 0
    π otherwise
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Ec := integral(S(t)^2, t = -ti .. ti) = 0.0864
ωv := 2*π*5.215/ti = 341321
Ew := 1/(2*π)*integral(s(ω)^2, ω = -ωv .. ωv) = 0.0846723
Ew/Ec*100 = 98.0004
V(t) := 1/(2*π)*integral(s(ω)*e^(-1i*ω*t), ω = -ωv .. ωv)
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