# Тема 4. Корреляционный анализ сигналов.
# Заданы два сигнала. Определить их автокорреляционные функции аналитическим методом. Рассчитать взаимокорреляционную функцию двух сигналов и определить интервал корреляции, как сдвиг во времени, при котором величина взаимокорреляционной функции Buv() становится меньше Buv max.
# Длительность 1 сигнала: | Длительность 2 сигнала:
τ[2] := 8
τ[1] := 4
# Амплитуда 1 сигнала: | Амплитуда 2 сигнала:
E[1] := 2
E[2] := 4
S(t) :=
    E[1] if 0 < t ≤ 3*τ[1]/4
    E[1]*(τ[1] - t) if 3*τ[1]/4 ≤ t ≤ τ[1]
G(t) :=
    -E[2] if 0 ≤ t ≤ 3*τ[2]/4
    (-E)[2]/2*(τ[2] - t) if 3*τ[2]/4 ≤ t ≤ τ[2]
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# Решение:
# Автокорреляционная функция:
B(a) := integral(S(t)*S(t - a), t = a .. τ[1])
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# Взаимокорелляционная функция:
B_1(a) := integral(|S(t)*G(t - a)|, t = a .. τ[1])
B_2(a) := integral(|S(t)*G(t - a)|, t = 0 .. τ[1])
B_3(a) := integral(|S(t)*G(t - a)|, t = 0 .. τ[2] + a)
Bmax := B_1(0) = 28
Bmin := B_1(0)*0.01 = 0.28
Bmin(a) := 0.28
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tk := 3.808 + 7.664 = 11.472
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