# Тема 5. Сигналы с ограниченным спектром.
# Задан сигнал. Определить эффективную ширину спектра данного сигнала. Рассчитать отсчетные значения этого сигнала, необходимые для его однозначного восстановления. Восстановить сигнал по его отсчетным значениям.
# Длительность сигнала:
ti := 6*10^-6
# Амплитуда сигнала:
E := 10
# Циклическая частота сигнала:
ω := 2*π/ti = 1047198
# Решение:
# Исходный сигнал:
S(t) := -E*t/ti
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Ec := integral(S(t)^2, t = 0 .. ti)
Sjw := integral(S(t)*e^(-1i*ω*t), t = 0 .. ti)
Re(Sjw) = 0
Im(Sjw) = -9.5493e-6
Rez := Re(Sjw)^2 + Im(Sjw)^2 = 9.11891e-11
ωv :=
    ωv ← 6600000
    E ← 0
    while E < 0.98*Ec
        E ← 1/π*integral(Rez, t = 0 .. ωv)
        ωv ← ωv + 1
    ωv
ωv = 6752480
fv := ωv/(2*π) = 1074691
Δ := 1/(2*fv) = 4.6525e-7
N := ti/Δ + 1 = 13.8963
N := 14
Δ := ti/(N - 1) = 4.61538e-7
Sd :=
    for k ∈ 1 .. N
        Si[k] ← S((k - 1)*Δ)
        k ← k + 1
    Si
t := [Δ, 2*Δ, 3*Δ, 4*Δ, 5*Δ, 6*Δ, 7*Δ, 8*Δ, 9*Δ, 10*Δ, 11*Δ, 12*Δ, 13*Δ]
# Отсчетные значения исходного сигнала по оси времени:
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Sd = [0; 0; -0.769231; -1.53846; -2.30769; -3.07692; -3.84615; -4.61538; -5.38462; -6.15385; -6.92308; -7.69231; -8.46154; -9.23077; -10]
# Восстановленный сигнал:
S(t) := sum(sin(ωv*(t - k*π/ωv))/(ωv*(t - k*π/ωv))*Sd[k], k = 0 .. N)
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