# Тема 6. Дискретные сигналы.
# Дискретный сигнал задан в виде набора из 8 равноотстоящих отсчетов на интервале своей периодичности. Определить коэффициенты дискретного преобразования Фурье. Восстановить сигнал по полученным коэффициентам.
# Количество отсчетов:
T := 8
# Значения отсчетов:
x := [2; 2; 1; 1; 0; 0; 1; 1]
# Решение:
# Коэффициенты дискретного преобразования Фурье:
Cn :=
    for i ∈ 1 .. T
        C[i] ← (1/T)*sum(x[k]*e^(-1i*2*π*k*(i - 1)/T), k = 0 .. T - 1)
        i ← i + 1
    C
    = [0; 1; 0.426777 - 0.176777i; -8.13321e-17 - 5.55112e-17i; 0.0732233 - 0.176777i; -6.12303e-17i; 0.0732233 + 0.176777i; -6.1315e-17 - 1.94289e-16i; 0.426777 + 0.176777i]
# Восстановленный сигнал:
x(t) := Cn[1] + 2*|Cn[2]|*cos(2*π*t/T - atan(Im(Cn[2])/Re(Cn[2]))) + 2*|Cn[3]|*cos(4*π*t/T + π/2) + 2*|Cn[4]|*cos(6*π*t/T - atan(Im(Cn[4])/Re(Cn[4]))) + |Cn[5]|*cos(8*π*t/T + π/2)
# График восстановленного сигнала:
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